<Lems>

    <!--

        This LEMS file has been automatically generated using PyNeuroML v1.3.12 (libNeuroML v0.6.5)

     -->

    <!-- Specify which component to run -->
    <Target component="Sim_IClamp_RIM" reportFile="report.Sim_IClamp_RIM.txt"/>

    <!-- Include core NeuroML2 ComponentType definitions -->
    <Include file="Cells.xml"/>
    <Include file="Networks.xml"/>
    <Include file="Simulation.xml"/>
    <Include file="PyNN.xml"/>
    <Include file="IClamp_RIM.net.nml"/>
    <Include file="RIM.cell.nml"/>

    <Simulation id="Sim_IClamp_RIM" length="8000.0ms" step="0.025ms" target="IClamp_RIM" seed="12345">  <!-- Note seed: ensures same random numbers used every run -->
        <Display id="pop_RIM_0_biophys/membraneProperties/leak_chans/gDensity" title="Plots of pop_RIM_0_biophys/membraneProperties/leak_chans/gDensity" timeScale="1ms" xmin="-1100.0" xmax="12100.000000000002" ymin="-1" ymax="1">
            <Line id="pop_RIM_0_RIM_biophys_membraneProperties_leak_chans_gDensity" quantity="pop_RIM/0/RIM/biophys/membraneProperties/leak_chans/gDensity" scale="1" color="#d54f33" timeScale="1ms"/>
        </Display>

        <Display id="pop_RIM_0_biophys/membraneProperties/leak_chans/iDensity" title="Plots of pop_RIM_0_biophys/membraneProperties/leak_chans/iDensity" timeScale="1ms" xmin="-1100.0" xmax="12100.000000000002" ymin="-1" ymax="1">
            <Line id="pop_RIM_0_RIM_biophys_membraneProperties_leak_chans_iDensity" quantity="pop_RIM/0/RIM/biophys/membraneProperties/leak_chans/iDensity" scale="1" color="#0534e4" timeScale="1ms"/>
        </Display>

        <Display id="pop_RIM_0_caConc" title="Plots of pop_RIM_0_caConc" timeScale="1ms" xmin="-1100.0" xmax="12100.000000000002" ymin="-1" ymax="1">
            <Line id="pop_RIM_0_RIM_caConc" quantity="pop_RIM/0/RIM/caConc" scale="1" color="#98e752" timeScale="1ms"/>
        </Display>

        <Display id="pop_RIM_v" title="Plots of pop_RIM_v" timeScale="1ms" xmin="-1100.0" xmax="12100.000000000002" ymin="-80" ymax="40">
            <Line id="pop_RIM_0_RIM_v" quantity="pop_RIM/0/RIM/v" scale="1mV" color="#bca074" timeScale="1ms"/>
            <Line id="voltage_1" quantity="pop_RIM/1/RIM/v" scale="1mV" color="0 1 0" timeScale="1ms"/>
            <Line id="voltage_2" quantity="pop_RIM/2/RIM/v" scale="1mV" color="0 0 1" timeScale="1ms"/>
            <Line id="voltage_3" quantity="pop_RIM/3/RIM/v" scale="1mV" color="1 1 0" timeScale="1ms"/>
            <Line id="voltage_4" quantity="pop_RIM/4/RIM/v" scale="1mV" color="0 1 1" timeScale="1ms"/>
            <Line id="voltage_5" quantity="pop_RIM/5/RIM/v" scale="1mV" color="1 0 1" timeScale="1ms"/>
            <Line id="voltage_6" quantity="pop_RIM/6/RIM/v" scale="1mV" color="0.5 0.5 0.5" timeScale="1ms"/>
            <Line id="voltage_7" quantity="pop_RIM/7/RIM/v" scale="1mV" color="0.5 0 0.5" timeScale="1ms"/>
            <Line id="voltage_8" quantity="pop_RIM/8/RIM/v" scale="1mV" color="0.5 0.5 0" timeScale="1ms"/>
            <Line id="voltage_9" quantity="pop_RIM/9/RIM/v" scale="1mV" color="0 0.5 0.5" timeScale="1ms"/>
            <Line id="voltage_10" quantity="pop_RIM/10/RIM/v" scale="1mV" color="0.3 0.3 0.3" timeScale="1ms"/>
        </Display>

        <OutputFile id="Sim_IClamp_RIM_pop_RIM_v_dat" fileName="Sim_IClamp_RIM.pop_RIM.v.dat">
            <OutputColumn id="pop_RIM_0_RIM_v" quantity="pop_RIM/0/RIM/v"/>
            <OutputColumn id="voltage_1" quantity="pop_RIM/1/RIM/v"/>
            <OutputColumn id="voltage_2" quantity="pop_RIM/2/RIM/v"/>
            <OutputColumn id="voltage_3" quantity="pop_RIM/3/RIM/v"/>
            <OutputColumn id="voltage_4" quantity="pop_RIM/4/RIM/v"/>
            <OutputColumn id="voltage_5" quantity="pop_RIM/5/RIM/v"/>
            <OutputColumn id="voltage_6" quantity="pop_RIM/6/RIM/v"/>
            <OutputColumn id="voltage_7" quantity="pop_RIM/7/RIM/v"/>
            <OutputColumn id="voltage_8" quantity="pop_RIM/8/RIM/v"/>
            <OutputColumn id="voltage_9" quantity="pop_RIM/9/RIM/v"/>
            <OutputColumn id="voltage_10" quantity="pop_RIM/10/RIM/v"/>
        </OutputFile>

        <OutputFile id="pop_RIM_0_biophys_membraneProperties_leak_chans_gDensity_dat" fileName="pop_RIM_0.biophys_membraneProperties_leak_chans_gDensity.dat">
            <OutputColumn id="pop_RIM_0_RIM_biophys_membraneProperties_leak_chans_gDensity" quantity="pop_RIM/0/RIM/biophys/membraneProperties/leak_chans/gDensity"/>
        </OutputFile>

        <OutputFile id="pop_RIM_0_biophys_membraneProperties_leak_chans_iDensity_dat" fileName="pop_RIM_0.biophys_membraneProperties_leak_chans_iDensity.dat">
            <OutputColumn id="pop_RIM_0_RIM_biophys_membraneProperties_leak_chans_iDensity" quantity="pop_RIM/0/RIM/biophys/membraneProperties/leak_chans/iDensity"/>
        </OutputFile>

        <OutputFile id="pop_RIM_0_caConc_dat" fileName="pop_RIM_0.caConc.dat">
            <OutputColumn id="pop_RIM_0_RIM_caConc" quantity="pop_RIM/0/RIM/caConc"/>
        </OutputFile>

    </Simulation>

</Lems>
