<Lems>

    <!--

        This LEMS file has been automatically generated using PyNeuroML v1.3.14 (libNeuroML v0.6.6)

     -->

    <!-- Specify which component to run -->
    <Target component="Sim_IClamp_VA5" reportFile="report.Sim_IClamp_VA5.txt"/>

    <!-- Include core NeuroML2 ComponentType definitions -->
    <Include file="Cells.xml"/>
    <Include file="Networks.xml"/>
    <Include file="Simulation.xml"/>

    <Include file="PyNN.xml"/>
    <Include file="IClamp_VA5.net.nml"/>
    <Include file="VA5.cell.nml"/>

    <Simulation id="Sim_IClamp_VA5" length="11000.0ms" step="0.025ms" target="IClamp_VA5" seed="12345">  <!-- Note seed: ensures same random numbers used every run -->
        <Display id="pop_VA5_0_caConc" title="Plots of pop_VA5_0_caConc" timeScale="1ms" xmin="-1100.0" xmax="12100.000000000002" ymin="-1" ymax="1">
            <Line id="pop_VA5_0_VA5_caConc" quantity="pop_VA5/0/VA5/caConc" scale="1" color="#d54f33" timeScale="1ms"/>
        </Display>

        <Display id="pop_VA5_10_caConc" title="Plots of pop_VA5_10_caConc" timeScale="1ms" xmin="-1100.0" xmax="12100.000000000002" ymin="-1" ymax="1">
            <Line id="pop_VA5_10_VA5_caConc" quantity="pop_VA5/10/VA5/caConc" scale="1" color="#0534e4" timeScale="1ms"/>
        </Display>

        <Display id="pop_VA5_1_caConc" title="Plots of pop_VA5_1_caConc" timeScale="1ms" xmin="-1100.0" xmax="12100.000000000002" ymin="-1" ymax="1">
            <Line id="pop_VA5_1_VA5_caConc" quantity="pop_VA5/1/VA5/caConc" scale="1" color="#98e752" timeScale="1ms"/>
        </Display>

        <Display id="pop_VA5_2_caConc" title="Plots of pop_VA5_2_caConc" timeScale="1ms" xmin="-1100.0" xmax="12100.000000000002" ymin="-1" ymax="1">
            <Line id="pop_VA5_2_VA5_caConc" quantity="pop_VA5/2/VA5/caConc" scale="1" color="#bca074" timeScale="1ms"/>
        </Display>

        <Display id="pop_VA5_3_caConc" title="Plots of pop_VA5_3_caConc" timeScale="1ms" xmin="-1100.0" xmax="12100.000000000002" ymin="-1" ymax="1">
            <Line id="pop_VA5_3_VA5_caConc" quantity="pop_VA5/3/VA5/caConc" scale="1" color="#632794" timeScale="1ms"/>
        </Display>

        <Display id="pop_VA5_4_caConc" title="Plots of pop_VA5_4_caConc" timeScale="1ms" xmin="-1100.0" xmax="12100.000000000002" ymin="-1" ymax="1">
            <Line id="pop_VA5_4_VA5_caConc" quantity="pop_VA5/4/VA5/caConc" scale="1" color="#8a5d88" timeScale="1ms"/>
        </Display>

        <Display id="pop_VA5_5_caConc" title="Plots of pop_VA5_5_caConc" timeScale="1ms" xmin="-1100.0" xmax="12100.000000000002" ymin="-1" ymax="1">
            <Line id="pop_VA5_5_VA5_caConc" quantity="pop_VA5/5/VA5/caConc" scale="1" color="#df5954" timeScale="1ms"/>
        </Display>

        <Display id="pop_VA5_6_caConc" title="Plots of pop_VA5_6_caConc" timeScale="1ms" xmin="-1100.0" xmax="12100.000000000002" ymin="-1" ymax="1">
            <Line id="pop_VA5_6_VA5_caConc" quantity="pop_VA5/6/VA5/caConc" scale="1" color="#52c8bf" timeScale="1ms"/>
        </Display>

        <Display id="pop_VA5_7_caConc" title="Plots of pop_VA5_7_caConc" timeScale="1ms" xmin="-1100.0" xmax="12100.000000000002" ymin="-1" ymax="1">
            <Line id="pop_VA5_7_VA5_caConc" quantity="pop_VA5/7/VA5/caConc" scale="1" color="#bf0239" timeScale="1ms"/>
        </Display>

        <Display id="pop_VA5_8_caConc" title="Plots of pop_VA5_8_caConc" timeScale="1ms" xmin="-1100.0" xmax="12100.000000000002" ymin="-1" ymax="1">
            <Line id="pop_VA5_8_VA5_caConc" quantity="pop_VA5/8/VA5/caConc" scale="1" color="#3f9fe8" timeScale="1ms"/>
        </Display>

        <Display id="pop_VA5_9_caConc" title="Plots of pop_VA5_9_caConc" timeScale="1ms" xmin="-1100.0" xmax="12100.000000000002" ymin="-1" ymax="1">
            <Line id="pop_VA5_9_VA5_caConc" quantity="pop_VA5/9/VA5/caConc" scale="1" color="#dda9d2" timeScale="1ms"/>
        </Display>

        <Display id="pop_VA5_v" title="Plots of pop_VA5_v" timeScale="1ms" xmin="-1100.0" xmax="12100.000000000002" ymin="-80" ymax="40">
            <Line id="pop_VA5_0_VA5_v" quantity="pop_VA5/0/VA5/v" scale="1mV" color="#85ad96" timeScale="1ms"/>
            <Line id="pop_VA5_1_VA5_v" quantity="pop_VA5/1/VA5/v" scale="1mV" color="#59438f" timeScale="1ms"/>
            <Line id="pop_VA5_2_VA5_v" quantity="pop_VA5/2/VA5/v" scale="1mV" color="#5fa56f" timeScale="1ms"/>
            <Line id="pop_VA5_3_VA5_v" quantity="pop_VA5/3/VA5/v" scale="1mV" color="#b5b5a2" timeScale="1ms"/>
            <Line id="pop_VA5_4_VA5_v" quantity="pop_VA5/4/VA5/v" scale="1mV" color="#2ebe19" timeScale="1ms"/>
            <Line id="pop_VA5_5_VA5_v" quantity="pop_VA5/5/VA5/v" scale="1mV" color="#d30150" timeScale="1ms"/>
            <Line id="pop_VA5_6_VA5_v" quantity="pop_VA5/6/VA5/v" scale="1mV" color="#55490a" timeScale="1ms"/>
            <Line id="pop_VA5_7_VA5_v" quantity="pop_VA5/7/VA5/v" scale="1mV" color="#4bd9d0" timeScale="1ms"/>
            <Line id="pop_VA5_8_VA5_v" quantity="pop_VA5/8/VA5/v" scale="1mV" color="#69535e" timeScale="1ms"/>
            <Line id="pop_VA5_9_VA5_v" quantity="pop_VA5/9/VA5/v" scale="1mV" color="#27dae9" timeScale="1ms"/>
            <Line id="pop_VA5_10_VA5_v" quantity="pop_VA5/10/VA5/v" scale="1mV" color="#6143ed" timeScale="1ms"/>
        </Display>

        <OutputFile id="Sim_IClamp_VA5_pop_VA5_v_dat" fileName="Sim_IClamp_VA5.pop_VA5.v.dat">
            <OutputColumn id="pop_VA5_0_VA5_v" quantity="pop_VA5/0/VA5/v"/>
            <OutputColumn id="pop_VA5_1_VA5_v" quantity="pop_VA5/1/VA5/v"/>
            <OutputColumn id="pop_VA5_2_VA5_v" quantity="pop_VA5/2/VA5/v"/>
            <OutputColumn id="pop_VA5_3_VA5_v" quantity="pop_VA5/3/VA5/v"/>
            <OutputColumn id="pop_VA5_4_VA5_v" quantity="pop_VA5/4/VA5/v"/>
            <OutputColumn id="pop_VA5_5_VA5_v" quantity="pop_VA5/5/VA5/v"/>
            <OutputColumn id="pop_VA5_6_VA5_v" quantity="pop_VA5/6/VA5/v"/>
            <OutputColumn id="pop_VA5_7_VA5_v" quantity="pop_VA5/7/VA5/v"/>
            <OutputColumn id="pop_VA5_8_VA5_v" quantity="pop_VA5/8/VA5/v"/>
            <OutputColumn id="pop_VA5_9_VA5_v" quantity="pop_VA5/9/VA5/v"/>
            <OutputColumn id="pop_VA5_10_VA5_v" quantity="pop_VA5/10/VA5/v"/>
        </OutputFile>

        <OutputFile id="pop_VA5_0_caConc_dat" fileName="pop_VA5_0.caConc.dat">
            <OutputColumn id="pop_VA5_0_VA5_caConc" quantity="pop_VA5/0/VA5/caConc"/>
        </OutputFile>

        <OutputFile id="pop_VA5_1_caConc_dat" fileName="pop_VA5_1.caConc.dat">
            <OutputColumn id="pop_VA5_1_VA5_caConc" quantity="pop_VA5/1/VA5/caConc"/>
        </OutputFile>

        <OutputFile id="pop_VA5_10_caConc_dat" fileName="pop_VA5_10.caConc.dat">
            <OutputColumn id="pop_VA5_10_VA5_caConc" quantity="pop_VA5/10/VA5/caConc"/>
        </OutputFile>

        <OutputFile id="pop_VA5_2_caConc_dat" fileName="pop_VA5_2.caConc.dat">
            <OutputColumn id="pop_VA5_2_VA5_caConc" quantity="pop_VA5/2/VA5/caConc"/>
        </OutputFile>

        <OutputFile id="pop_VA5_3_caConc_dat" fileName="pop_VA5_3.caConc.dat">
            <OutputColumn id="pop_VA5_3_VA5_caConc" quantity="pop_VA5/3/VA5/caConc"/>
        </OutputFile>

        <OutputFile id="pop_VA5_4_caConc_dat" fileName="pop_VA5_4.caConc.dat">
            <OutputColumn id="pop_VA5_4_VA5_caConc" quantity="pop_VA5/4/VA5/caConc"/>
        </OutputFile>

        <OutputFile id="pop_VA5_5_caConc_dat" fileName="pop_VA5_5.caConc.dat">
            <OutputColumn id="pop_VA5_5_VA5_caConc" quantity="pop_VA5/5/VA5/caConc"/>
        </OutputFile>

        <OutputFile id="pop_VA5_6_caConc_dat" fileName="pop_VA5_6.caConc.dat">
            <OutputColumn id="pop_VA5_6_VA5_caConc" quantity="pop_VA5/6/VA5/caConc"/>
        </OutputFile>

        <OutputFile id="pop_VA5_7_caConc_dat" fileName="pop_VA5_7.caConc.dat">
            <OutputColumn id="pop_VA5_7_VA5_caConc" quantity="pop_VA5/7/VA5/caConc"/>
        </OutputFile>

        <OutputFile id="pop_VA5_8_caConc_dat" fileName="pop_VA5_8.caConc.dat">
            <OutputColumn id="pop_VA5_8_VA5_caConc" quantity="pop_VA5/8/VA5/caConc"/>
        </OutputFile>

        <OutputFile id="pop_VA5_9_caConc_dat" fileName="pop_VA5_9.caConc.dat">
            <OutputColumn id="pop_VA5_9_VA5_caConc" quantity="pop_VA5/9/VA5/caConc"/>
        </OutputFile>

    </Simulation>

</Lems>
