<Lems>

    <!--

        This LEMS file has been automatically generated using PyNeuroML v1.3.14 (libNeuroML v0.6.5)

     -->

    <!-- Specify which component to run -->
    <Target component="Sim_IClamp_VB6" reportFile="report.Sim_IClamp_VB6.txt"/>

    <!-- Include core NeuroML2 ComponentType definitions -->
    <Include file="Cells.xml"/>
    <Include file="Networks.xml"/>
    <Include file="Simulation.xml"/>

    <Include file="PyNN.xml"/>
    <Include file="IClamp_VB6.net.nml"/>
    <Include file="VB6.cell.nml"/>

    <Simulation id="Sim_IClamp_VB6" length="11000.0ms" step="0.025ms" target="IClamp_VB6" seed="12345">  <!-- Note seed: ensures same random numbers used every run -->

    <!--  <Display id="pop_VB6_0_biophys/membraneProperties/egl19_chans/egl19/m/q" title="Plots of pop_VB6_0_biophys/membraneProperties/egl19_chans/egl19/m/q" timeScale="1ms" xmin="-200.0" xmax="2640.0" ymin="-.1" ymax="1.1">

             final m value
            <Line id="pop_VB6_0_VB6_biophys_membraneProperties_egl19_chans_VB6_egl19_m_q" quantity="pop_VB6/0/VB6/biophys/membraneProperties/egl19_chans/egl19/m/q" scale="1" color="#0534e4" timeScale="1ms"/>
            <Line id="pop_VB6_0_VB6_biophys_membraneProperties_slo1egl19_chans_VB6_slo1egl19_m_egl19" quantity="pop_VB6/0/VB6/biophys/membraneProperties/slo1egl19_chans/slo1egl19/m/steadyState/m_egl19" scale="1" color="#ff3333" timeScale="1ms"/>

             inf m value
            <Line id="pop_VB6_0_VB6_biophys_membraneProperties_egl19_chans_VB6_egl19_m_q_inf" quantity="pop_VB6/0/VB6/biophys/membraneProperties/egl19_chans/egl19/m/steadyState/x" scale="1" color="#ffffe4" timeScale="1ms"/>
            <Line id="pop_VB6_0_VB6_biophys_membraneProperties_slo1egl19_chans_VB6_slo1egl19_m_act" quantity="pop_VB6/0/VB6/biophys/membraneProperties/slo1egl19_chans/slo1egl19/m/steadyState/actegl19" scale="1" color="#ff33ff" timeScale="1ms"/>

             final h value
            <Line id="pop_VB6_0_VB6_biophys_membraneProperties_egl19_chans_VB6_egl19_h_q" quantity="pop_VB6/0/VB6/biophys/membraneProperties/egl19_chans/egl19/h/q" scale="1" color="#05aaaa" timeScale="1ms"/>
            <Line id="pop_VB6_0_VB6_biophys_membraneProperties_slo1egl19_chans_VB6_slo1egl19_h_x" quantity="pop_VB6/0/VB6/biophys/membraneProperties/slo1egl19_chans/slo1egl19/h/steadyState/actegl19" scale="1" color="#ffff33" timeScale="1ms"/>
         </Display>
    -->

       <!--   <Display id="pop_VB6_0_biophys/membraneProperties/egl19_chans/gDensity" title="Plots of pop_VB6_0_biophys/membraneProperties/egl19_chans/gDensity" timeScale="1ms" xmin="-240.0" xmax="2640.0" ymin="-1" ymax="1">
            <Line id="pop_VB6_0_VB6_biophys_membraneProperties_egl19_chans_gDensity" quantity="pop_VB6/0/VB6/biophys/membraneProperties/egl19_chans/gDensity" scale="1" color="#98e752" timeScale="1ms"/>
        </Display>

        <Display id="pop_VB6_0_biophys/membraneProperties/egl19_chans/iDensity" title="Plots of pop_VB6_0_biophys/membraneProperties/egl19_chans/iDensity" timeScale="1ms" xmin="-240.0" xmax="2640.0" ymin="-1" ymax="1">
            <Line id="pop_VB6_0_VB6_biophys_membraneProperties_egl19_chans_iDensity" quantity="pop_VB6/0/VB6/biophys/membraneProperties/egl19_chans/iDensity" scale="1" color="#bca074" timeScale="1ms"/>
        </Display>

        <Display id="pop_VB6_0_biophys/membraneProperties/slo1egl19_chans/gDensity" title="Plots of pop_VB6_0_biophys/membraneProperties/slo1egl19_chans/gDensity" timeScale="1ms" xmin="-240.0" xmax="2640.0" ymin="-1" ymax="1">
            <Line id="pop_VB6_0_VB6_biophys_membraneProperties_slo1egl19_chans_gDensity" quantity="pop_VB6/0/VB6/biophys/membraneProperties/slo1egl19_chans/gDensity" scale="1" color="#98e752" timeScale="1ms"/>
        </Display>

        <Display id="pop_VB6_0_biophys/membraneProperties/slo1egl19_chans/iDensity" title="Plots of pop_VB6_0_biophys/membraneProperties/slo1egl19_chans/iDensity" timeScale="1ms" xmin="-240.0" xmax="2640.0" ymin="-1" ymax="1">
            <Line id="pop_VB6_0_VB6_biophys_membraneProperties_slo1egl19_chans_iDensity" quantity="pop_VB6/0/VB6/biophys/membraneProperties/slo1egl19_chans/iDensity" scale="1" color="#bca074" timeScale="1ms"/>
        </Display>

-->
       <!--
        <Display id="pop_VB6_0_caConc" title="Plots of pop_VB6_0_caConc" timeScale="1ms" xmin="-1100.0" xmax="12100.000000000002" ymin="-1e-4" ymax="6e-4">
            <Line id="pop_VB6_0_VB6_caConc" quantity="pop_VB6/0/VB6/caConc" scale="1" color="#d54f33" timeScale="1ms"/>
        </Display>

        <Display id="pop_VB6_10_caConc" title="Plots of pop_VB6_10_caConc" timeScale="1ms" xmin="-1100.0" xmax="12100.000000000002" ymin="-1" ymax="1">
            <Line id="pop_VB6_10_VB6_caConc" quantity="pop_VB6/10/VB6/caConc" scale="1" color="#0534e4" timeScale="1ms"/>
        </Display>

        <Display id="pop_VB6_1_caConc" title="Plots of pop_VB6_1_caConc" timeScale="1ms" xmin="-1100.0" xmax="12100.000000000002" ymin="-1" ymax="1">
            <Line id="pop_VB6_1_VB6_caConc" quantity="pop_VB6/1/VB6/caConc" scale="1" color="#98e752" timeScale="1ms"/>
        </Display>

        <Display id="pop_VB6_2_caConc" title="Plots of pop_VB6_2_caConc" timeScale="1ms" xmin="-1100.0" xmax="12100.000000000002" ymin="-1" ymax="1">
            <Line id="pop_VB6_2_VB6_caConc" quantity="pop_VB6/2/VB6/caConc" scale="1" color="#bca074" timeScale="1ms"/>
        </Display>

        <Display id="pop_VB6_3_caConc" title="Plots of pop_VB6_3_caConc" timeScale="1ms" xmin="-1100.0" xmax="12100.000000000002" ymin="-1" ymax="1">
            <Line id="pop_VB6_3_VB6_caConc" quantity="pop_VB6/3/VB6/caConc" scale="1" color="#632794" timeScale="1ms"/>
        </Display>

       <Display id="pop_VB6_4_caConc" title="Plots of pop_VB6_4_caConc" timeScale="1ms" xmin="-1100.0" xmax="12100.000000000002" ymin="-1" ymax="1">
            <Line id="pop_VB6_4_VB6_caConc" quantity="pop_VB6/4/VB6/caConc" scale="1" color="#8a5d88" timeScale="1ms"/>
        </Display>

        <Display id="pop_VB6_5_caConc" title="Plots of pop_VB6_5_caConc" timeScale="1ms" xmin="-1100.0" xmax="12100.000000000002" ymin="-1" ymax="1">
            <Line id="pop_VB6_5_VB6_caConc" quantity="pop_VB6/5/VB6/caConc" scale="1" color="#df5954" timeScale="1ms"/>
        </Display>

        <Display id="pop_VB6_6_caConc" title="Plots of pop_VB6_6_caConc" timeScale="1ms" xmin="-1100.0" xmax="12100.000000000002" ymin="-1" ymax="1">
            <Line id="pop_VB6_6_VB6_caConc" quantity="pop_VB6/6/VB6/caConc" scale="1" color="#52c8bf" timeScale="1ms"/>
        </Display>

        <Display id="pop_VB6_7_caConc" title="Plots of pop_VB6_7_caConc" timeScale="1ms" xmin="-1100.0" xmax="12100.000000000002" ymin="-1" ymax="1">
            <Line id="pop_VB6_7_VB6_caConc" quantity="pop_VB6/7/VB6/caConc" scale="1" color="#bf0239" timeScale="1ms"/>
        </Display>

        <Display id="pop_VB6_8_caConc" title="Plots of pop_VB6_8_caConc" timeScale="1ms" xmin="-1100.0" xmax="12100.000000000002" ymin="-1" ymax="1">
            <Line id="pop_VB6_8_VB6_caConc" quantity="pop_VB6/8/VB6/caConc" scale="1" color="#3f9fe8" timeScale="1ms"/>
        </Display>

        <Display id="pop_VB6_9_caConc" title="Plots of pop_VB6_9_caConc" timeScale="1ms" xmin="-1100.0" xmax="12100.000000000002" ymin="-1" ymax="1">
            <Line id="pop_VB6_9_VB6_caConc" quantity="pop_VB6/9/VB6/caConc" scale="1" color="#dda9d2" timeScale="1ms"/>
        </Display>
        -->
        <Display id="pop_VB6_v" title="Plots of pop_VB6_v" timeScale="1ms" xmin="-1100.0" xmax="12100.000000000002" ymin="-80" ymax="40">
            <Line id="pop_VB6_0_VB6_v" quantity="pop_VB6/0/VB6/v" scale="1mV" color="#85ad96" timeScale="1ms"/>
            <Line id="pop_VB6_1_VB6_v" quantity="pop_VB6/1/VB6/v" scale="1mV" color="#59438f" timeScale="1ms"/>
            <Line id="pop_VB6_2_VB6_v" quantity="pop_VB6/2/VB6/v" scale="1mV" color="#5fa56f" timeScale="1ms"/>
            <Line id="pop_VB6_3_VB6_v" quantity="pop_VB6/3/VB6/v" scale="1mV" color="#b5b5a2" timeScale="1ms"/>
            <Line id="pop_VB6_4_VB6_v" quantity="pop_VB6/4/VB6/v" scale="1mV" color="#2ebe19" timeScale="1ms"/>
            <Line id="pop_VB6_5_VB6_v" quantity="pop_VB6/5/VB6/v" scale="1mV" color="#d30150" timeScale="1ms"/>
            <Line id="pop_VB6_6_VB6_v" quantity="pop_VB6/6/VB6/v" scale="1mV" color="#55490a" timeScale="1ms"/>
            <Line id="pop_VB6_7_VB6_v" quantity="pop_VB6/7/VB6/v" scale="1mV" color="#4bd9d0" timeScale="1ms"/>
            <Line id="pop_VB6_8_VB6_v" quantity="pop_VB6/8/VB6/v" scale="1mV" color="#69535e" timeScale="1ms"/>
            <Line id="pop_VB6_9_VB6_v" quantity="pop_VB6/9/VB6/v" scale="1mV" color="#27dae9" timeScale="1ms"/>
            <Line id="pop_VB6_10_VB6_v" quantity="pop_VB6/10/VB6/v" scale="1mV" color="#6143ed" timeScale="1ms"/>
        </Display>

        <OutputFile id="Sim_IClamp_VB6_pop_VB6_v_dat" fileName="Sim_IClamp_VB6.pop_VB6.v.dat">
            <OutputColumn id="pop_VB6_0_VB6_v" quantity="pop_VB6/0/VB6/v"/>
            <OutputColumn id="pop_VB6_1_VB6_v" quantity="pop_VB6/1/VB6/v"/>
            <OutputColumn id="pop_VB6_2_VB6_v" quantity="pop_VB6/2/VB6/v"/>
            <OutputColumn id="pop_VB6_3_VB6_v" quantity="pop_VB6/3/VB6/v"/>
            <OutputColumn id="pop_VB6_4_VB6_v" quantity="pop_VB6/4/VB6/v"/>
            <OutputColumn id="pop_VB6_5_VB6_v" quantity="pop_VB6/5/VB6/v"/>
            <OutputColumn id="pop_VB6_6_VB6_v" quantity="pop_VB6/6/VB6/v"/>
            <OutputColumn id="pop_VB6_7_VB6_v" quantity="pop_VB6/7/VB6/v"/>
            <OutputColumn id="pop_VB6_8_VB6_v" quantity="pop_VB6/8/VB6/v"/>
            <OutputColumn id="pop_VB6_9_VB6_v" quantity="pop_VB6/9/VB6/v"/>
            <OutputColumn id="pop_VB6_10_VB6_v" quantity="pop_VB6/10/VB6/v"/>
        </OutputFile>
        <!--
        <OutputFile id="pop_VB6_0_caConc_dat" fileName="pop_VB6_0.caConc.dat">
            <OutputColumn id="pop_VB6_0_VB6_caConc" quantity="pop_VB6/0/VB6/caConc"/>
        </OutputFile>

        <OutputFile id="pop_VB6_1_caConc_dat" fileName="pop_VB6_1.caConc.dat">
            <OutputColumn id="pop_VB6_1_VB6_caConc" quantity="pop_VB6/1/VB6/caConc"/>
        </OutputFile>

        <OutputFile id="pop_VB6_10_caConc_dat" fileName="pop_VB6_10.caConc.dat">
            <OutputColumn id="pop_VB6_10_VB6_caConc" quantity="pop_VB6/10/VB6/caConc"/>
        </OutputFile>

        <OutputFile id="pop_VB6_2_caConc_dat" fileName="pop_VB6_2.caConc.dat">
            <OutputColumn id="pop_VB6_2_VB6_caConc" quantity="pop_VB6/2/VB6/caConc"/>
        </OutputFile>

        <OutputFile id="pop_VB6_3_caConc_dat" fileName="pop_VB6_3.caConc.dat">
            <OutputColumn id="pop_VB6_3_VB6_caConc" quantity="pop_VB6/3/VB6/caConc"/>
        </OutputFile>

        <OutputFile id="pop_VB6_4_caConc_dat" fileName="pop_VB6_4.caConc.dat">
            <OutputColumn id="pop_VB6_4_VB6_caConc" quantity="pop_VB6/4/VB6/caConc"/>
        </OutputFile>

        <OutputFile id="pop_VB6_5_caConc_dat" fileName="pop_VB6_5.caConc.dat">
            <OutputColumn id="pop_VB6_5_VB6_caConc" quantity="pop_VB6/5/VB6/caConc"/>
        </OutputFile>

        <OutputFile id="pop_VB6_6_caConc_dat" fileName="pop_VB6_6.caConc.dat">
            <OutputColumn id="pop_VB6_6_VB6_caConc" quantity="pop_VB6/6/VB6/caConc"/>
        </OutputFile>

        <OutputFile id="pop_VB6_7_caConc_dat" fileName="pop_VB6_7.caConc.dat">
            <OutputColumn id="pop_VB6_7_VB6_caConc" quantity="pop_VB6/7/VB6/caConc"/>
        </OutputFile>

        <OutputFile id="pop_VB6_8_caConc_dat" fileName="pop_VB6_8.caConc.dat">
            <OutputColumn id="pop_VB6_8_VB6_caConc" quantity="pop_VB6/8/VB6/caConc"/>
        </OutputFile>

        <OutputFile id="pop_VB6_9_caConc_dat" fileName="pop_VB6_9.caConc.dat">
            <OutputColumn id="pop_VB6_9_VB6_caConc" quantity="pop_VB6/9/VB6/caConc"/>
        </OutputFile> -->    <!-- -->
    </Simulation>

</Lems>
