<Lems>

    <!--

        This LEMS file has been automatically generated using PyNeuroML v1.3.15 (libNeuroML v0.6.5)

     -->

    <!-- Specify which component to run -->
    <Target component="iv_AVAL"/>

    <!-- Include core NeuroML2 ComponentType definitions -->
    <Include file="Cells.xml"/>
    <Include file="Networks.xml"/>
    <Include file="Simulation.xml"/>

    <Include file="AVAL.cell.nml"/>
    <Include file="egl19.channel.nml"/>
    <Include file="irk.channel.nml"/>
    <Include file="leak.channel.nml"/>
    <Include file="iv_AVAL.net.nml"/>

    <Simulation id="iv_AVAL" length="1700.0ms" step="0.05ms" target="network_of_AVAL" seed="12345">  <!-- Note seed: ensures same random numbers used every run -->
        <Display id="Voltage_display" title="Voltages" timeScale="1ms" xmin="-170.0" xmax="1870.0000000000002" ymin="-90" ymax="50">
            <Line id="v_cell0" quantity="population_of_AVAL[0]/v" scale="1mV" color="#3d5c3d" timeScale="1ms"/>
            <Line id="v_cell1" quantity="population_of_AVAL[1]/v" scale="1mV" color="#08ff69" timeScale="1ms"/>
            <Line id="v_cell2" quantity="population_of_AVAL[2]/v" scale="1mV" color="#60a5c7" timeScale="1ms"/>
            <Line id="v_cell3" quantity="population_of_AVAL[3]/v" scale="1mV" color="#aa86db" timeScale="1ms"/>
            <Line id="v_cell4" quantity="population_of_AVAL[4]/v" scale="1mV" color="#7bd92f" timeScale="1ms"/>
            <Line id="v_cell5" quantity="population_of_AVAL[5]/v" scale="1mV" color="#e2d992" timeScale="1ms"/>
            <Line id="v_cell6" quantity="population_of_AVAL[6]/v" scale="1mV" color="#8afab7" timeScale="1ms"/>
        </Display>

        <OutputFile id="Volts_file" fileName="iv_AVAL.v.dat">
            <OutputColumn id="v_cell0" quantity="population_of_AVAL[0]/v"/>
            <OutputColumn id="v_cell1" quantity="population_of_AVAL[1]/v"/>
            <OutputColumn id="v_cell2" quantity="population_of_AVAL[2]/v"/>
            <OutputColumn id="v_cell3" quantity="population_of_AVAL[3]/v"/>
            <OutputColumn id="v_cell4" quantity="population_of_AVAL[4]/v"/>
            <OutputColumn id="v_cell5" quantity="population_of_AVAL[5]/v"/>
            <OutputColumn id="v_cell6" quantity="population_of_AVAL[6]/v"/>
        </OutputFile>

    </Simulation>

</Lems>
