<Lems>

    <!--

        This LEMS file has been automatically generated using PyNeuroML v1.3.15 (libNeuroML v0.6.5)

     -->

    <!-- Specify which component to run -->
    <Target component="iv_AVAR"/>

    <!-- Include core NeuroML2 ComponentType definitions -->
    <Include file="Cells.xml"/>
    <Include file="Networks.xml"/>
    <Include file="Simulation.xml"/>

    <Include file="AVAR.cell.nml"/>
    <Include file="leak.channel.nml"/>
    <Include file="unc103.channel.nml"/>
    <Include file="irk.channel.nml"/>
    <Include file="egl19.channel.nml"/>
    <Include file="nca.channel.nml"/>
    <Include file="iv_AVAR.net.nml"/>

    <Simulation id="iv_AVAR" length="1700.0ms" step="0.05ms" target="network_of_AVAR" seed="12345">  <!-- Note seed: ensures same random numbers used every run -->
        <Display id="Voltage_display" title="Voltages" timeScale="1ms" xmin="-170.0" xmax="1870.0000000000002" ymin="-90" ymax="50">
            <Line id="v_cell0" quantity="population_of_AVAR[0]/v" scale="1mV" color="#31d69d" timeScale="1ms"/>
            <Line id="v_cell1" quantity="population_of_AVAR[1]/v" scale="1mV" color="#c593b2" timeScale="1ms"/>
            <Line id="v_cell2" quantity="population_of_AVAR[2]/v" scale="1mV" color="#f6dbb7" timeScale="1ms"/>
            <Line id="v_cell3" quantity="population_of_AVAR[3]/v" scale="1mV" color="#d36040" timeScale="1ms"/>
            <Line id="v_cell4" quantity="population_of_AVAR[4]/v" scale="1mV" color="#e1aab7" timeScale="1ms"/>
            <Line id="v_cell5" quantity="population_of_AVAR[5]/v" scale="1mV" color="#19a54e" timeScale="1ms"/>
            <Line id="v_cell6" quantity="population_of_AVAR[6]/v" scale="1mV" color="#fbabb3" timeScale="1ms"/>
        </Display>

        <OutputFile id="Volts_file" fileName="iv_AVAR.v.dat">
            <OutputColumn id="v_cell0" quantity="population_of_AVAR[0]/v"/>
            <OutputColumn id="v_cell1" quantity="population_of_AVAR[1]/v"/>
            <OutputColumn id="v_cell2" quantity="population_of_AVAR[2]/v"/>
            <OutputColumn id="v_cell3" quantity="population_of_AVAR[3]/v"/>
            <OutputColumn id="v_cell4" quantity="population_of_AVAR[4]/v"/>
            <OutputColumn id="v_cell5" quantity="population_of_AVAR[5]/v"/>
            <OutputColumn id="v_cell6" quantity="population_of_AVAR[6]/v"/>
        </OutputFile>

    </Simulation>

</Lems>
