<neuroml xmlns="http://www.neuroml.org/schema/neuroml2"  xmlns:xs="http://www.w3.org/2001/XMLSchema" xmlns:xsi="http://www.w3.org/2001/XMLSchema-instance" xsi:schemaLocation="http://www.neuroml.org/schema/neuroml2 https://raw.github.com/NeuroML/NeuroML2/development/Schemas/NeuroML2/NeuroML_v2.3.1.xsd" id="unc2">
    <notes>An ion channel from Nicoletti et al. 2024</notes>

    <ionChannelHH id="unc2" species="ca" conductance="10 pS">

        <gate id="m" instances="1" type="gateHHtauInf">
            <timeCourse type="unc2_m_tau"/>
            <steadyState type="unc2_m_inf"/>
        </gate>

        <gate id="h" instances="1" type="gateHHtauInf">
            <timeCourse type="unc2_h_tau"/>
            <steadyState type="unc2_h_inf"/>
        </gate>
    </ionChannelHH>

    <ComponentType name="unc2_m_inf" extends="baseVoltageDepVariable">
        <Constant name="VOLT_SCALE" dimension="voltage" value="1 mV"/>
        <Constant name="va_unc2" dimension="none" value="-12.17"/>
        <Constant name="ka_unc2" dimension="none" value="3.97"/>
        <Dynamics>
            <DerivedVariable name="V" dimension="none" value="(v) / VOLT_SCALE"/>
            <DerivedVariable name="x" dimension="none" exposure="x" value="1 / (1 + exp(-(V - va_unc2 + 25) / ka_unc2))"/>
        </Dynamics>
    </ComponentType>

    <ComponentType name="unc2_m_tau" extends="baseVoltageDepTime">
        <Constant name="VOLT_SCALE" dimension="voltage" value="1 mV"/>
        <Constant name="TIME_SCALE" dimension="time" value="1 ms"/>
        <Constant name="p1tmunc2" dimension="none" value="1.4969"/>
        <Constant name="p2tmunc2" dimension="none" value="-8.1761"/>
        <Constant name="p3tmunc2" dimension="none" value="9.0753"/>
        <Constant name="p4tmunc2" dimension="none" value="15.3456"/>
        <Constant name="p5tmunc2" dimension="none" value="0.1029"/>
        <Dynamics>
            <DerivedVariable name="V" dimension="none" value="(v) / VOLT_SCALE"/>
            <DerivedVariable name="t" dimension="time" exposure="t"
                value ="(p1tmunc2/(exp(-(V-p2tmunc2+30)/(p3tmunc2))+exp((V-p2tmunc2+30)/(p4tmunc2)))+p5tmunc2)*3 * TIME_SCALE"/>
         </Dynamics>
    </ComponentType>

    <ComponentType name="unc2_h_inf" extends="baseVoltageDepVariable">
        <Constant name="VOLT_SCALE" dimension="voltage" value="1 mV"/>
        <Constant name="vi_unc2" dimension="none" value="-52.47"/>
        <Constant name="ki_unc2" dimension="none" value="5.6"/>
        <Dynamics>
            <DerivedVariable name="V" dimension="none" value="(v) / VOLT_SCALE"/>
            <DerivedVariable name="x" dimension="none" exposure="x" value="1 / (1 + exp((V - vi_unc2 + 25) / ki_unc2))"/>
        </Dynamics>
    </ComponentType>

    <ComponentType name="unc2_h_tau" extends="baseVoltageDepTime">
        <Constant name="VOLT_SCALE" dimension="voltage" value="1 mV"/>
        <Constant name="TIME_SCALE" dimension="time" value="1 ms"/>
        <Constant name="p1thunc2" dimension="none" value="83.8037"/>
        <Constant name="p2thunc2" dimension="none" value="52.8997"/>
        <Constant name="p3thunc2" dimension="none" value="3.4557"/>
        <Constant name="p4thunc2" dimension="none" value="72.0995"/>
        <Constant name="p5thunc2" dimension="none" value="23.9009"/>
        <Constant name="p6thunc2" dimension="none" value="3.5903"/>
        <Dynamics>
            <DerivedVariable name="V" dimension="none" value="(v) / VOLT_SCALE"/>
            <DerivedVariable name="t" dimension="time" exposure="t"
                value="(p1thunc2 / (1 + exp((V - p2thunc2) / p3thunc2)) + p4thunc2 / (1 + exp(-(V - p5thunc2) / p6thunc2))) * TIME_SCALE"/>
        </Dynamics>
    </ComponentType>
</neuroml>
